g := 9.8
m := 3
aa := 1
Ω := 1
λ := g/(aa*Ω^2)
γ := aa^2*m
ind_st := 0
ind_end := 10
ind_count := 1*10^3
D(u, Y) := [Y[1]; m*aa^2*Ω^2/γ*sin(Y[0])*(cos(Y[0]) - λ)]
Equation(a, b) := Rkadapt([a; b], ind_st, ind_end, ind_count, D)
x_0 := -25
y_0 := -10
x_n := 25
y_n := 10
x_count := 30
y_count := 10
X_int := x_0, x_0 + (x_n - x_0)/(x_count + 1) .. x_n
Y_int := y_0, y_0 + (y_n - y_0)/(y_count + 1) .. y_n
M_XY :=
    k ← 0
    for x ∈ X_int
        for y ∈ Y_int
            k ← k + 1
            M_XY ← Equation(x, y)
            if k == 1
                M_X ← M_XY[:, 1]
                M_Y ← M_XY[:, 2]
            otherwise
                M_X ← augment(M_X, M_XY[:, 1])
                M_Y ← augment(M_Y, M_XY[:, 2])
    [M_X; M_Y]
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Radius := 1
M_cylinder :=
    for i ∈ 0 .. rows(M_XY[0]) - 1
        for j ∈ 0 .. cols(M_XY[0]) - 1
            K ← M_XY[0][i, j]
            M_X[i, j] ← cos(K/Radius)
            M_Y[i, j] ← sin(K/Radius)
    [M_X; M_Y]
# [component: inputs (M_cylinder[0], M_cylinder[1], M_XY[1])]
